*Heading
** Job name: Direct_9grain Model name: Model-1
** Generated by: Abaqus/CAE 6.14-3
*Preprint, echo=NO, model=NO, history=NO, contact=NO
**
** PARTS
**
*Part, name=Part-1
*Node
      1,          1.5,         -0.5, 0.0149999997
      2,          1.5,          0.5, 0.0149999997
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*Element, type=C3D8R
 1,  79, 481, 517,  78,   1,  49,  60,   4
 2, 481, 482, 518, 517,  49,  50,  59,  60
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*Elset, elset=grain1
 197, 198, 199, 200, 201, 202
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*Elset, elset=grain2
  50,  51,  52,  53,  54,  55
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*Elset, elset=grain3
 344, 345, 346, 347, 348, 349
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*Elset, elset=grain4
 246, 247, 248, 249, 250, 251
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*Elset, elset=grain5, generate
 393,  490,    1
*Elset, elset=grain6
   1,   2,   3,   4,   5,   6
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*Elset, elset=grain7
 148, 149, 150, 151, 152, 153
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*Elset, elset=grain8
  99, 100, 101, 102, 103, 104
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*Elset, elset=grain9
 295, 296, 297, 298, 299, 300
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** Section: Section-6
*Solid Section, elset=grain6, controls=EC-1, material=ELSET6_DAMAGE
,
** Section: Section-2
*Solid Section, elset=grain2, controls=EC-1, material=ELSET2_DAMAGE
,
** Section: Section-8
*Solid Section, elset=grain8, controls=EC-1, material=ELSET8_DAMAGE
,
** Section: Section-7
*Solid Section, elset=grain7, controls=EC-1, material=ELSET7_DAMAGE
,
** Section: Section-1
*Solid Section, elset=grain1, controls=EC-1, material=ELSET1_DAMAGE
,
** Section: Section-4
*Solid Section, elset=grain4, controls=EC-1, material=ELSET4_DAMAGE
,
** Section: Section-9
*Solid Section, elset=grain9, controls=EC-1, material=ELSET9_DAMAGE
,
** Section: Section-3
*Solid Section, elset=grain3, controls=EC-1, material=ELSET3_DAMAGE
,
** Section: Section-5
*Solid Section, elset=grain5, controls=EC-1, material=ELSET5_DAMAGE
,
*End Part
**
**
** ASSEMBLY
**
*Assembly, name=Assembly
**
*Instance, name=Part-1-1, part=Part-1
*End Instance
**
*Nset, nset=_PickedSet63, internal, instance=Part-1-1
  18,  19,  20,  21,  24,  25
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*Elset, elset=_PickedSet63, internal, instance=Part-1-1
 141, 142, 143, 144, 145, 146
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*Nset, nset=_PickedSet67, internal, instance=Part-1-1
   9,  10,  11,  12,  27,  30
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*Elset, elset=_PickedSet67, internal, instance=Part-1-1
  50,  51,  52,  53,  54,  55
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*Nset, nset=_PickedSet70, internal, instance=Part-1-1, generate
    1,  1452,     1
*Elset, elset=_PickedSet70, internal, instance=Part-1-1, generate
   1,  882,    1
*Nset, nset=_PickedSet72, internal, instance=Part-1-1
  22,  23,  24,  25,  28,  29
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*Elset, elset=_PickedSet72, internal, instance=Part-1-1
 148, 155, 162, 169, 176, 183
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*End Assembly
**
** ELEMENT CONTROLS
**
*Section Controls, name=EC-1, hourglass=ENHANCED
1., 1., 1.
*Amplitude, name=Amp-1
             0.,              0.,            0.25,              1.,             0.5,              0.,            0.75,             -1.
             1.,              0.
**
** MATERIALS
**
*Material, name=ELSET1_DAMAGE
*Depvar
    471,
*User Material, constants=2
1.,1.
*Material, name=ELSET2_DAMAGE
*Depvar
    471,
*User Material, constants=2
1.,1.
*Material, name=ELSET3_DAMAGE
*Depvar
    471,
*User Material, constants=2
1.,1.
*Material, name=ELSET4_DAMAGE
*Depvar
    471,
*User Material, constants=2
1.,1.
*Material, name=ELSET5_DAMAGE
*Depvar
    471,
*User Material, constants=2
1.,1.
*Material, name=ELSET6_DAMAGE
*Depvar
    471,
*User Material, constants=2
1.,1.
*Material, name=ELSET7_DAMAGE
*Depvar
    471,
*User Material, constants=2
1.,1.
*Material, name=ELSET8_DAMAGE
*Depvar
    471,
*User Material, constants=2
1.,1.
*Material, name=ELSET9_DAMAGE
*Depvar
    471,
*User Material, constants=2
1.,1.
**
** BOUNDARY CONDITIONS
**
** Name: fix_x Type: Displacement/Rotation
*Boundary
_PickedSet72, 1, 1
** Name: fix_y Type: Displacement/Rotation
*Boundary
_PickedSet63, 2, 2
** Name: fix_z Type: Displacement/Rotation
*Boundary
_PickedSet70, 3, 3
** ----------------------------------------------------------------
**
** STEP: Step-1
**
*Step, name=Step-1, nlgeom=NO, inc=2000
*Static
1e-03, 1., 1e-06, 0.025
*Controls, reset
*Controls, parameters=time incrementation
150, 200, , 250, , , ,50 , ,
**
** BOUNDARY CONDITIONS
**
** Name: disp_y Type: Displacement/Rotation
*Boundary, amplitude=Amp-1
_PickedSet67, 2, 2, 0.15
** Name: fix_y Type: Displacement/Rotation
*Boundary
_PickedSet63, 4, 4
_PickedSet63, 5, 5
_PickedSet63, 6, 6
**
** OUTPUT REQUESTS
**
*Restart, write, frequency=0
**
** FIELD OUTPUT: F-Output-1
**
*Output, field, variable=PRESELECT
**
** HISTORY OUTPUT: H-Output-1
**
*Output, history, variable=PRESELECT
*End Step
